ORIGIN := 1
n := 5
checkMatrix := [1, 2, -1; 3, 0, 2; 4, -2, 5]
randomFilling(n) :=
    for i ∈ 1 .. n
        for j ∈ 1 .. n
            A[i, j] ← round(1 + rnd(10 - 1))
    A
a := randomFilling(3) = [1, 3, 6; 4, 8, 3; 7, 4, 2]
# алгебраические дополнения | метод присоединенной матрицы
algDop(matrix, m, n) :=
    for i ∈ 1 .. rows(matrix) - 1
        for j ∈ 1 .. cols(matrix)
            matrix1[i, j] ← matrix[i, j] if i < m
            matrix1[i, j] ← matrix[i + 1, j] if i ≥ m
    for i ∈ 1 .. rows(matrix) - 1
        for j ∈ 1 .. cols(matrix) - 1
            matrix2[i, j] ← matrix1[i, j] if j < n
            matrix2[i, j] ← matrix1[i, j + 1] if j ≥ n
    matrix2
addMatrix(matrix) :=
    n ← rows(matrix)
    matrix ← transpose(matrix)
    for i ∈ 1 .. n
        for j ∈ 1 .. n
            A[i, j] ← (-1)^(i + j)*|algDop(matrix, i, j)|
    A/|matrix|
# временные затраты
addMatrix(checkMatrix) = [-1, 2, -1; 1.75, -2.25, 1.25; 1.5, -2.5, 1.5]
timeCosts(size) :=
    for i ∈ 2 .. size
        A ← randomFilling(i)
        t_0 ← time(0)
        invM ← addMatrix(A)
        t_1 ← time(1)
        res[i, 1] ← i
        res[i, 2] ← t_1 - t_0
    res
timeCosts2(n) :=
    for i ∈ 2 .. n
        A ← randomFilling(i)
        t_0 ← time(0)
        invM ← A^-1
        t_1 ← time(1)
        res[i, 1] ← i
        res[i, 2] ← t_1 - t_0
    res
test1 := timeCosts(50)
test2 := timeCosts2(50)
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невязка
δ ← 1/(n - 1)*sqrt(sum((H[o] - h[o])^2, o = 0 .. n - 1))
discrepancy(n) :=
    A ← randomFilling(n)
    b1 ← addMatrix(A)
    b2 ← A^-1
    d ← 1/n*sqrt(sum(sum((b1[i, j] - b2[i, j])^2, j = 1 .. n), i = 1 .. n))
    d
t := 2 .. 50
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